// COMSOL Multiphysics 6.2.0.339 model "Glass_training_COmsol.mph"
// Outline of the model tree

Geometry
  geom1 "Geometry 1" (2D, length unit cm)
    r1: Rectangle | pos = {-0.75, 0}; size = {6.5, 5}
    r2: Rectangle | pos = {-0.2, 0.6}; size = {5.4, 3.8}
    r3: Rectangle | pos = {5.75, 4}
    uni1: Union | input = r2(1), r1(1), r3(1)
    del1: Delete "Delete Entities 1" | input = uni1(1) boundaries 9
    fil1: Fillet | point = del1(1) points 1, 3-8; radius = 1
    copy1: Copy | input = fil1; keep = on; displx = 0; disply = 0
    mir1: Mirror | input = copy1; pos = {6.75, 0}
    pt1: Point | p = {-0.75, 4.4}
    pt2: Point | p = {14.25, 4.4}
    uni2: Union | input = fil1, mir1, pt1, pt2
    fin: Finalize "Form Union"

Materials
  mat1: Common "Monel 400 [solid,annealed]" on domains 1, 3
    def "Basic"
      thermalconductivity = k_solid_annealed_1(T)
      resistivity = res(T)
      thermalexpansioncoefficient = (alpha(T)+(Tempref-293[K])*if(abs(T-Tempref)>1e-3,(alpha(T)-alpha(Tempref))/(T-Tempref),d(alpha(T),T)))/(1+alpha(Tempref)*(Tempref-293[K]))
      heatcapacity = C(T)
      electricconductivity = sigma(T)
      density = rho(T)
      TD = TD_solid_annealed_1(T)
      k_solid_annealed_1: Piecewise
        arg = T
        pieces = 
          {4.0, 31.0, -0.841836615+0.566916548*T^1-0.0605683264*T^2+0.00748462102*T^3-4.10323569E-4*T^4+1.03187276E-5*T^5-9.85066671E-8*T^6}
          {31.0, 147.0, -0.668360576+0.56426554*T^1-0.00857232135*T^2+7.73363649E-5*T^3-4.01902534E-7*T^4+1.12650186E-9*T^5-1.32470245E-12*T^6}
          {147.0, 1255.41, 8.64587155+0.126065325*T^1-5.44120506E-4*T^2+1.34580192E-6*T^3-1.64780184E-9*T^4+9.83384922E-13*T^5-2.28302509E-16*T^6}
        argunit = K
        fununit = W/(m*K)
      res: Piecewise | arg = T; pieces = {77.0, 1366.51, 2.391838E-7+1.5204E-9*T^1-2.652848E-12*T^2+2.145325E-15*T^3-6.108918E-19*T^4}; argunit = K; fununit = ohm*m
      alpha: Piecewise
        arg = T
        pieces = 
          {0.0, 107.0, 8.76079383E-6+2.92792879E-8*T^1+8.48123065E-11*T^2-6.21111671E-13*T^3}
          {107.0, 177.0, -3.79504719E-6+3.43583437E-7*T^1-2.68754176E-9*T^2+9.39102813E-12*T^3-1.22011586E-14*T^4}
          {177.0, 1366.51, 1.20635034E-5+4.89832173E-9*T^1-2.98610907E-13*T^2}
        argunit = K
        fununit = 1/K
      C: Piecewise | arg = T; pieces = {88.0, 588.71, -100.987409+4.83633162*T^1-0.0170401517*T^2+2.74397264E-5*T^3-1.63381644E-8*T^4}; argunit = K; fununit = J/(kg*K)
      sigma: Piecewise | arg = T; pieces = {77.0, 1366.51, 1/(-6.108918E-19*T^4+2.145325E-15*T^3-2.652848E-12*T^2+1.520400E-09*T+2.391838E-07)}; argunit = K; fununit = S/m
      rho: Piecewise
        arg = T
        pieces = 
          {0.0, 257.0, 8865.19456-0.0478555357*T^1+0.00144207487*T^2-2.56021094E-5*T^3+1.01351547E-7*T^4-1.30099574E-10*T^5}
          {257.0, 1366.51, 8891.11187-0.284243638*T^1-1.28304726E-4*T^2+1.48689125E-8*T^3}
        argunit = K
        fununit = kg/m^3
      TD_solid_annealed_1: Piecewise
        arg = T
        pieces = 
          {88.0, 231.0, 3.01716296E-5-5.29371819E-7*T^1+4.99526666E-9*T^2-2.46459928E-11*T^3+6.20932699E-14*T^4-6.29459694E-17*T^5}
          {231.0, 588.71, 1.11749236E-5-5.48060344E-8*T^1+2.04320228E-10*T^2-3.16920836E-13*T^3+1.86668075E-16*T^4}
        argunit = K
        fununit = m^2/s
    ThermalExpansion
      alphatan = CTE(T)
      dL = (dL(T)-dL(Tempref))/(1+dL(Tempref))
      dL: Piecewise
        arg = T
        pieces = 
          {0.0, 152.0, -0.00256624558-1.28314837E-7*T^1+1.69605795E-8*T^2+1.05143788E-10*T^3+3.61264601E-14*T^4}
          {152.0, 1366.51, -0.00353508663+1.06299338E-5*T^1+4.98581477E-9*T^2-2.98610934E-13*T^3}
        argunit = K
      CTE: Piecewise
        arg = T
        pieces = 
          {0.0, 107.0, 3.3921159E-8*T^1+3.15431364E-10*T^2+1.4450584E-13*T^3}
          {107.0, 177.0, 4.29323658E-4-1.41551639E-5*T^1+1.83065472E-7*T^2-1.14439337E-9*T^3+3.48744061E-12*T^4-4.16533532E-15*T^5}
          {177.0, 1366.51, 1.07681883E-5+9.97162954E-9*T^1-8.95832802E-13*T^2}
        argunit = K
        fununit = 1/K
    Enu "Young's modulus and Poisson's ratio"
      E = E(T)
      nu = 0.32
      E: Piecewise | arg = T; pieces = {293.0, 1144.0, 2.092662E11-1.166588E8*T^1+172116.1*T^2-116.639*T^3}; argunit = K; fununit = Pa
    KG "Bulk modulus and shear modulus"
      K = 1.73080833E11[N/m^2]
      G = 7.08057955E10[N/m^2]
  mat2: Common "Material 2" on domains 2, 4
    def "Basic"
      density = 7190
    Enu "Young's modulus and Poisson's ratio"
      E = 279*1E9
      nu = 0.21

Physics
  solid: SolidMechanics on all domains
    dependent variable u = {u, v, w}
    d.d = 0.005
    lemm1: LinearElasticModel "Linear Elastic Material 1" (default)
    free1: Free (default)
    init1: init "Initial Values 1" (default)
    fix1: Fixed "Fixed Constraint 1" on boundaries 2
    bndl1: BoundaryLoad on boundaries 21 | LoadType = TotalForce; Ftot = {0, 3, 0}; FperArea = {0, 3, 0}

Mesh
  mesh1 "Mesh 1"
    size: MeshSizeDefault | hmax = 0.15; hmin = 3.0E-4; hcurve = 0.2; hauto = 1
    ftri1: FreeTri "Free Triangular 1" on entire geometry

Studies
  std1 "Study 1"
    stat: Stationary

Solver configurations
  sol1 "Solution 1" (study std1)
    v1: Variables "Dependent Variables 1"
    s1: Stationary "Stationary Solver 1"
      dDef: Direct
      fc1: FullyCoupled | linsolver = dDef

Datasets
  dset1: Solution | solution = sol1

Plots
  pg1: PlotGroup2D "Stress (solid)" | data = dset1
    surf1: Surface | expr = solid.misesGp
      def: Deform "Deformation" | expr = {u, v}; descr = Displacement field
  pg2: PlotGroup1D "1D Plot Group 2" | data = dset1